// Generated config.glm based on config/simulation_configuration.csv
#define WEATHER=CA-San_Jose_Intl_Ap.tmy3
#define STARTTIME=2020-01-01 00:00:00 PST
#define STOPTIME=2020-03-30 00:00:00 PST
#define TIMEZONE=PST+8PDT
#define TARIFF=tou.tariff
